<?xml version="1.0" encoding="UTF-8"?>
<?xml-stylesheet type="text/xsl"
href="http://jsbsim.sourceforge.net/JSBSim.xsl"?>
<fdm_config name="ASW 20 15-meter class sailplane" release="ALPHA" version="2.0"
    xsi:noNamespaceSchemaLocation="http://jsbsim.sourceforge.net/JSBSim.xsd"
    xmlns:xsi="http://www.w3.org/2001/XMLSchema-instance"
    xmlns:xs="http://www.w3.org/2001/XMLSchema">

  <fileheader>
    <author> D-NXKT </author>
    <email> d_nxkt@yahoo.de </email>
    <filecreationdate> 2013-07-12 </filecreationdate>
    <version> $Version 1.0 $ </version>
    <description> Models ASW-20 sailplane (conversion from UIUC-FDM) </description>
    <note> some kind of remarks</note>
    <limitation> --- </limitation>
    <documentation>
       see "/Aircraft/UIUC/asw20-v1-nl/aircraft.dat"
    </documentation>
    <reference>
       Ref 1: /Aircraft/UIUC/asw20-v1-nl/README.asw20.html
              /Aircraft/UIUC/asw20-v1-nl/aircraft.dat
              /Aircraft/UIUC/asw20-v1-nl/CDfa-01.dat
              /Aircraft/UIUC/asw20-v1-nl/CLfa-01.dat
              /Aircraft/UIUC/asw20-v1-nl/Cmfa-01.dat
       Ref 2: Flight and Operations Manual for Sailplane Model ASW 20; July, 1977 Edition
              (http://ebookbrowse.com/asw20-flight-manual-pdf-d182065150)
       Ref 3: Luftfahrt-Bundesamt Geraetekennblatt Nr. 314; Ausgabe Nr.13; 20.02.1997
       Ref 4: Johnson, R.H., "A Flight Test Evaluation of the ASW 20," Soaring Magazine, May 1978
       Ref 5: http://www.alexander-schleicher.de/service/polaren/polare20A.jpg
       Ref 6: http://www.alpenstreckenflug.de/Prospekte/Alexander%20Schleicher/ASW%2020/page_01.htm
       Ref 7: Jones, Nathan H, "Glider Ground Effect Investigation" Thesis, Department of The Air Force
              Air University, Wright-Patterson Air force Base Ohio, USA, 1989, Storming Media, Washington DC 20002
    </reference>
  </fileheader>

  <metrics>

    <wingarea unit="FT2">113.</wingarea>    <!-- [x] see asw20 notes 021011 -->
    <wingspan unit="FT">49.2</wingspan>     <!-- [x] see asw20 notes 021011 -->
    <chord unit="FT">2.297</chord>          <!-- [x] see asw20 notes 021011 -->
    <wing_incidence>0.00</wing_incidence>

    <!--
        ___________________________________________________

         datum of all locations is wing root leading edge!
	 ( distance xDatum to xModel = +0.36m
	   xJSBsim = xModel + 0.36m )
        ___________________________________________________
    -->

    <location name="AERORP" unit="M">
      <x>0.24</x>
      <y>0.</y>
      <z>0.</z>
    </location>

    <location name="EYEPOINT" unit="M">
      <x>-0.32</x>
      <y>0.</y>
      <z>0.16</z>
    </location>

    <location name="VRP" unit="M">
      <x>0.36</x>
      <y>0.</y>
      <z>0.</z>
    </location>

  </metrics>

  <mass_balance>

    <ixx unit="KG*M2">1288.684</ixx>    <!-- [x] see asw20 notes 021011 <ixx unit="SLUG*FT2"> 950.478</ixx> -->
    <iyy unit="KG*M2"> 510.085</iyy>	   <!-- minus Steiner Pilot (=75.55*0.6^2) [x] see asw20 notes 021011 <iyy unit="SLUG*FT2"> 396.277</iyy> <iyy unit="KG*M2"> 537.283</iyy>-->
    <izz unit="KG*M2">1756.687</izz>    <!-- [x] see asw20 notes 021011 <izz unit="SLUG*FT2">1295.657</izz> -->
    <ixz unit="KG*M2">   0.   </ixz>	<!-- [x] see asw20 notes 021011 <ixz unit="SLUG*FT2">   0.   </ixz> -->

    <emptywt unit="KG">255.0</emptywt>  <!-- Ref. 2 p. 17 -->
    <location name="CG" unit="M">
      <x>0.6283</x>  <!-- 0.178 -->
      <y>0.</y>
      <z>0.</z>
    </location>

    <pointmass name="Pilot">
      <weight unit="KG">85.</weight>
      <location name="POINTMASS" unit="M">
        <x>-0.595</x> <!-- (0.55m - 6.25m)/2  (was -0.25 error?)-->
        <y>0.</y>
        <z>0.</z>
      </location>
    </pointmass>

    <pointmass name="Baggage">
      <weight unit="KG">6.</weight>
      <location name="POINTMASS" unit="M">
        <x>0.08</x>
        <y>0.</y>
        <z>-0.1</z>
      </location>
    </pointmass>

    <pointmass name="TrimDisc">
      <weight unit="KG">2.</weight>
      <location name="POINTMASS" unit="M">
        <x>-1.48</x>   <!-- -1.84 -->
        <y>0.</y>
        <z>-0.3</z>
      </location>
    </pointmass>

    <pointmass name="PermanentTrimWeight">
      <weight unit="KG">0.</weight>
      <location name="POINTMASS" unit="M">
        <x>4.16</x>
        <y>0.</y>
        <z>0.</z>
      </location>
    </pointmass>

    <pointmass name="InstrumentsPanel">
      <weight unit="KG">2.</weight>
      <location name="POINTMASS" unit="M">
        <x>-1.250</x>
        <y>0.</y>
        <z>-0.15</z>
      </location>
    </pointmass>

    <pointmass name="WaterBallast_left">
      <weight unit="KG">0.</weight>
      <location name="POINTMASS" unit="M">
        <x>0.26</x>
        <y>-2.6</y>
        <z>0.</z>
      </location>
    </pointmass>

    <pointmass name="WaterBallast_right">
      <weight unit="KG">0.</weight>
      <location name="POINTMASS" unit="M">
        <x>0.26</x>
        <y>2.6</y>
        <z>0.</z>
      </location>
    </pointmass>

  </mass_balance>

  <ground_reactions>

    <contact name="Main_Gear" type="BOGEY">
      <location unit="M">
        <x> 0.08</x>
        <y> 0.0 </y>
        <!-- <z>-0.74</z>  -->
	<z>-0.94</z>
      </location>
      <static_friction>0.70</static_friction>
      <dynamic_friction>0.50</dynamic_friction>
      <rolling_friction>0.02</rolling_friction>
      <spring_coeff unit="N/M">11200</spring_coeff>
      <damping_coeff unit="N/M/SEC">5600</damping_coeff>
      <damping_coeff_rebound unit="N/M/SEC">5600.</damping_coeff_rebound>
      <max_steer unit="DEG">0</max_steer>
      <brake_group>LEFT</brake_group>
      <retractable>1</retractable>
    </contact>

    <contact name="Nose" type="STRUCTURE">
      <location unit="M">
        <x>-1.89</x>
        <y> 0.0 </y>
        <z>-0.32</z>
      </location>
      <static_friction>1.80</static_friction>
      <dynamic_friction>0.2</dynamic_friction>
      <spring_coeff unit="N/M">9800</spring_coeff>
      <damping_coeff unit="LBS/FT/SEC">490</damping_coeff>
      <damping_coeff_rebound unit="N/M/SEC">4900.</damping_coeff_rebound>
    </contact>

    <contact name="FuselageBottom1" type="STRUCTURE">
      <location unit="M">
        <x>-1.14</x>
        <y> 0.0 </y>
        <z>-0.55</z>
      </location>
      <static_friction>1.0</static_friction>
      <dynamic_friction>0.2</dynamic_friction>
      <spring_coeff unit="LBS/FT">1200</spring_coeff>
      <damping_coeff unit="LBS/FT/SEC">500</damping_coeff>
      <damping_coeff_rebound unit="N/M/SEC">500.</damping_coeff_rebound>
    </contact>

    <contact name="FuselageBottom2" type="STRUCTURE">
      <location unit="M">
        <x>-0.44</x>
        <y>0.0</y>
        <z>-0.57</z>
      </location>
      <static_friction>1.0</static_friction>
      <dynamic_friction>0.2</dynamic_friction>
      <spring_coeff unit="LBS/FT">1200</spring_coeff>
      <damping_coeff unit="LBS/FT/SEC">500</damping_coeff>
      <damping_coeff_rebound unit="N/M/SEC">500.</damping_coeff_rebound>
    </contact>

    <contact name="Tail_Skid" type="STRUCTURE">
      <location unit="M">
        <x> 4.15</x>
        <y> 0.0 </y>
        <z>-0.24</z>
      </location>
      <static_friction>1.0</static_friction>
      <dynamic_friction>0.8</dynamic_friction>
      <spring_coeff unit="N/M">8000</spring_coeff>
      <damping_coeff unit="N/M/SEC">4000</damping_coeff>
      <damping_coeff_rebound unit="N/M/SEC">4000.</damping_coeff_rebound>
    </contact>

    <contact name="Tail_top" type="STRUCTURE">
      <location unit="M">
        <x>4.12</x>
        <y>0.0 </y>
        <z>1.23</z>
      </location>
      <static_friction>1.80</static_friction>
      <dynamic_friction>0.2</dynamic_friction>
      <spring_coeff unit="LBS/FT">800</spring_coeff>
      <damping_coeff unit="LBS/FT/SEC">400</damping_coeff>
    </contact>

    <contact name="Left_Wing" type="STRUCTURE">
      <location unit="M">
        <x> 0.11</x>
        <y>-7.92</y>
        <z> 0.52</z>
      </location>
      <static_friction>1.80</static_friction>
      <dynamic_friction>0.2</dynamic_friction>
      <spring_coeff unit="LBS/FT">300</spring_coeff>
      <damping_coeff unit="LBS/FT/SEC">150</damping_coeff>
      <damping_coeff_rebound unit="N/M/SEC">150.</damping_coeff_rebound>
    </contact>

    <contact name="Right_Wing" type="STRUCTURE">
      <location unit="M">
        <x>0.11</x>
        <y>7.92</y>
        <z>0.52</z>
      </location>
      <static_friction>1.80</static_friction>
      <dynamic_friction>0.2</dynamic_friction>
      <spring_coeff unit="LBS/FT">300</spring_coeff>
      <damping_coeff unit="LBS/FT/SEC">150</damping_coeff>
      <damping_coeff_rebound unit="N/M/SEC">150.</damping_coeff_rebound>
    </contact>

  </ground_reactions>

  <external_reactions>

    <!-- external forces, for winch start and aerotowing -->
    <!-- Method DG101 (Nikolaus Kerner) -->
    <property>fcs/winch-cmd-norm</property>

    <force name="winchx" frame="BODY" unit="N" >
      <location unit="M">
        <x> -0.14</x>
        <y>  0.0</y>
        <z> -0.6</z>
      </location>
      <direction>
        <x> 1.0</x>
        <y> 0.0</y>
        <z> 0.0</z>
      </direction>
    </force>

    <force name="winchy" frame="BODY" unit="N" >
      <location unit="M">
        <x> -0.14</x>
        <y>  0.0</y>
        <z> -0.6</z>
      </location>
      <direction>
        <x> 0.0</x>
        <y> 1.0</y>
        <z> 0.0</z>
      </direction>
    </force>

    <force name="winchz" frame="BODY" unit="N" >
      <location unit="M">
        <x> -0.14</x>
        <y>  0.0</y>
        <z> -0.6</z>
      </location>
      <direction>
        <x> 0.0</x>
        <y> 0.0</y>
        <z> 1.0</z>
      </direction>
    </force>


    <property>fcs/dragger-cmd-norm</property>

    <force name="dragx" frame="BODY" unit="N" >
      <location unit="M">
        <x> -1.89</x>
        <y>  0.00</y>
        <z> -0.32</z>
      </location>
      <direction>
        <x> 1.0</x>
        <y> 0.0</y>
        <z> 0.0</z>
      </direction>
    </force>

    <force name="dragy" frame="BODY" unit="N" >
      <location unit="M">
        <x> -1.89</x>
        <y>  0.00</y>
        <z> -0.32</z>
      </location>
      <direction>
        <x> 0.0</x>
        <y> 1.0</y>
        <z> 0.0</z>
      </direction>
    </force>

    <force name="dragz" frame="BODY" unit="N" >
      <location unit="M">
        <x> -1.89</x>
        <y>  0.0</y>
        <z> -0.32</z>
      </location>
      <direction>
        <x> 0.0</x>
        <y> 0.0</y>
        <z> 1.0</z>
      </direction>
    </force>

    <force name="GenericEngine" frame="BODY">
      <location unit="M">
        <x>0.36</x>
        <y>0.0</y>
        <z>0.5</z>
      </location>

      <direction>
        <x>1.0</x>
        <y>0.0</y>
        <z>0.0</z>
      </direction>
    </force>

  </external_reactions>

  <propulsion>
     <!-- generic engine used (defined in external_reactions) -->
  </propulsion>

  <flight_control name="FCS: asw20">

    <channel name="Pitch">

      <summer name="Pitch Trim Sum">
        <input>fcs/elevator-cmd-norm</input>
        <input>fcs/pitch-trim-cmd-norm</input>
        <clipto>
          <min>-1</min>
          <max>1</max>
        </clipto>
      </summer>

      <aerosurface_scale name="Elevator Control">
        <input>fcs/pitch-trim-sum</input>
	<gain>0.01745</gain>
        <range>
          <min>-24.5</min>  <!-- Ref. 3 p. 3 -->
          <max>+20.0</max>
        </range>
        <output>fcs/elevator-pos-rad</output>
      </aerosurface_scale>

      <aerosurface_scale name="elevator normalization">
        <input>fcs/elevator-pos-deg</input>
        <domain>
          <min>-24.5</min>
          <max>+24.5</max>
        </domain>
        <range>
          <min>-1</min>
          <max>1</max>
        </range>
        <output>fcs/elevator-pos-norm</output>
      </aerosurface_scale>

    </channel>

    <channel name="Roll">

      <aerosurface_scale name="Aileron Control Rad">
        <input>fcs/aileron-cmd-norm</input>
	<gain>0.01745</gain>                        <!-- Ref. 2 p. 42 -->
        <range>                                     <!-- Flap Pos. 3 (0deg) -->
          <min>-16.</min>
          <max>+16.</max>
        </range>
        <!-- <output>fcs/aileron-pos-rad</output> -->
      </aerosurface_scale>

      <aerosurface_scale name="Left Aileron Control">
        <input>fcs/aileron-cmd-norm</input>
	<gain>0.01745</gain>
        <range>                                     <!-- Flap Pos. 3 (0deg) -->
          <min>-16.</min>
          <max>+14.</max>
        </range>
        <output>fcs/left-aileron-pos-rad</output>
      </aerosurface_scale>

      <aerosurface_scale name="left aileron normalization">
        <input>fcs/left-aileron-pos-rad</input>
        <domain>
          <min>-0.27925</min>   <!-- = -16deg -->
          <max>+0.27925</max>
        </domain>
        <range>
          <min>-1</min>
          <max>1</max>
        </range>
        <output>fcs/left-aileron-pos-norm</output>
      </aerosurface_scale>

      <aerosurface_scale name="Right Aileron Control">
        <input>-fcs/aileron-cmd-norm</input>
	<gain>0.01745</gain>
        <range>
          <min>-16.</min>
          <max>+14.</max>
        </range>
        <output>fcs/right-aileron-pos-rad</output>
      </aerosurface_scale>

      <aerosurface_scale name="right aileron normalization">
        <input>fcs/right-aileron-pos-rad</input>
        <domain>
          <min>-0.27925</min>
          <max>+0.27925</max>
        </domain>
        <range>
          <min>-1</min>
          <max>1</max>
        </range>
        <output>fcs/right-aileron-pos-norm</output>
      </aerosurface_scale>

    </channel>

    <channel name="Yaw">

      <summer name="Rudder Command Sum">
        <input>fcs/rudder-cmd-norm</input>
        <input>fcs/yaw-trim-cmd-norm</input>
        <clipto>
          <min>-1.</min>
          <max>1.</max>
        </clipto>
      </summer>

      <aerosurface_scale name="Rudder Control">
        <input>fcs/rudder-command-sum</input>
	<gain>0.01745</gain>
        <range>
          <min>-31.</min>    <!-- Ref. 3 p 4 -->
          <max>+31.</max>
        </range>
        <output>fcs/rudder-pos-rad</output>
      </aerosurface_scale>

      <aerosurface_scale name="rudder normalization">
        <input>fcs/rudder-pos-deg</input>
        <domain>
          <min>-31.</min>
          <max>+31.</max>
        </domain>
        <range>
          <min>-1</min>
          <max>1</max>
        </range>
        <output>fcs/rudder-pos-norm</output>
      </aerosurface_scale>
    </channel>

    <channel name="Flaps">
      <kinematic name="Flaps Control">
    	<input>fcs/flap-cmd-norm</input>
    	<traverse>
    	  <setting>
    	    <position>0</position>  <!-- negative values forbidden?
	    				flap position = real flap position + 11deg -->
    	    <time>1</time>
          </setting>
    	  <setting>
    	    <position>5</position>
    	    <time>0.5</time>
    	  </setting>
    	  <setting>
    	    <position>11</position>
    	    <time>0.5</time>
    	  </setting>
    	  <setting>
    	    <position>20</position>
    	    <time>0.5</time>
    	  </setting>
	  <setting>
    	    <position>66</position>
    	    <time>1</time>
	  </setting>
    	</traverse>
    	<output>fcs/flap-pos-deg_shifted</output>
      </kinematic>

      <summer>
        <input>fcs/flap-pos-deg_shifted</input>
        <bias>-11.</bias>
        <output>fcs/flap-pos-deg</output>
      </summer>

      <aerosurface_scale name="Flap position normalized">
        <input>fcs/flap-pos-deg</input>
        <zero_centered>true</zero_centered>
        <domain>
           <min>-11</min>
           <max>55</max>
        </domain>
        <range>
            <min>-1.</min>
            <max>5.</max>
        </range>
        <gain>1.</gain>
        <clipto>
          <min>-999</min>
          <max>+999</max>
        </clipto>
        <output>fcs/flap-pos-norm</output>
      </aerosurface_scale>
    </channel>

    <channel name="Speedbrake">
      <kinematic name="Speedbrake Control">
        <input>fcs/spoiler-cmd-norm</input>
        <traverse>
          <setting>
            <position>0.000</position>
            <time>0.0</time>
          </setting>
          <setting>
            <position>0.333</position>
            <time>0.5</time>
          </setting>
          <setting>
            <position>0.666</position>
            <time>0.5</time>
          </setting>
          <setting>
            <position>1.000</position>
            <time>0.5 </time>
          </setting>
        </traverse>
        <output>fcs/speedbrake-pos-norm</output>
      </kinematic>
    </channel>

    <channel name="Landing Gear">
      <kinematic name="Gear Control">
        <input>gear/gear-cmd-norm</input>
        <traverse>
          <setting>
            <position>0</position>
            <time>0</time>
          </setting>
          <setting>
            <position>1</position>
            <time>1.35</time>
          </setting>
        </traverse>
        <output>gear/gear-pos-norm</output>
      </kinematic>
    </channel>

    <channel name="Hook">
      <kinematic name="Hook Released">
        <input>fcs/winch-cmd-norm</input>
        <traverse>
          <setting>
            <position> 0 </position>
            <time>     0 </time>
          </setting>
          <setting>
            <position> 1 </position>
            <time>     0.5 </time>
          </setting>
        </traverse>
        <output>fcs/hook-pos-norm</output>
      </kinematic>
    </channel>


    <!-- store some variables outside JSBSim loop -->
    <channel name="Water Dumping">
      <switch name="/sim/asw20/waterballast/dumping">
        <default value="0"/>
        <test value="1">
          /sim/asw20/waterballast/valve eq 1
          inertia/pointmass-weight-lbs[5] gt 0.
        </test>
        <!-- <output>/sim/asw20/waterballast/dumping</output> -->
      </switch>
    </channel>

    <channel name="Wing Deflection">

      <fcs_function name="/sim/asw20/wing_load_lbs">
        <function>
	  <sum>
            <property>forces/fbz-aero-lbs</property>
	    <product>
	      <property>accelerations/Nz</property> <!--  will cause wing-failure at initialization -->
	      <!-- <property>/accelerations/n-z-cg-fps_sec</property>
	      <value>-1.</value> -->
	      <sum>
	        <value>306.</value>				      <!-- Ref. 4 p. 1 : 153lbs * 2   -->
	        <property>inertia/pointmass-weight-lbs[4]</property>  <!-- water ballast left -->
	        <property>inertia/pointmass-weight-lbs[5]</property>  <!-- water ballast right -->
	      </sum>
	    </product>
	  </sum>
        </function>
      </fcs_function>

      <fcs_function name="/sim/asw20/wing_load">
        <function>
          <product>
	    <property>/sim/asw20/wing_load_lbs</property>
	    <value>0.0014</value>
	    <value>1.9</value>
          </product>
        </function>
      </fcs_function>

      <fcs_function name="Wing Contact Point Deflection">
        <function>
	  <sum>
            <product>
	      <sum>
                <property>/sim/asw20/wing_load</property>
	        <value>1.</value>     <!-- offset 1.0 deg -->
	      </sum>
	      <value>-0.01745</value> <!-- deg to rad -->
	      <value>11.75</value>    <!-- inner wing length + 2 * outer wing length [m] -->
	      <value>39.3701</value>  <!-- [m] to [inch] -->
            </product>
	    <value>23.</value>
	  </sum>
        </function>
	<output>contact/unit[6]/z-position</output>
	<output>contact/unit[7]/z-position</output>
      </fcs_function>

      <fcs_function name="Wing View Deflection">
        <function name="Wing View Deflection">
	  <sum>
            <product>
	      <property>contact/unit[6]/z-position</property>
	      <value>0.0254</value>   <!-- [inch] to [m] -->
	    </product>
	    <value>0.4</value>        <!-- offset [m] -->
	  </sum>
        </function>
      </fcs_function>

      <switch name="systems/switch/view_offset">
        <default value="/sim/current-view/y-offset-m"/>
        <test value="Wing-View-Deflection">
	   /sim/current-view/view-number eq 8
        </test>
	<output>/sim/current-view/y-offset-m</output>
    </switch>

    </channel>

  </flight_control>

  <aerodynamics>

    <function name="aero/alpha-shifted-deg">
      <sum>
    	<property>aero/alpha-deg</property>
        <table>
    	  <independentVar
    	  lookup="row">fcs/flap-pos-deg</independentVar>
    	  <tableData>	     <!-- delta alpha to gain V_minimum_loss in Ref. 2-->
    	    -11.  -4.
    	     -6.  -2.
    	      0.   0.
    	      9.   2.
    	     55.   4.
    	  </tableData>
    	</table>
      </sum>
    </function>

     <function name="aero/F_GroundEffect">   <!-- Ref. 7 p 23 (2.7) -->
      <difference>
        <value>1.</value>
	<exp>
	  <product>
	    <value>-2.48</value>
	    <pow>
	      <product>
	        <value>0.04</value>
	   <!-- <property>position/h-agl-ft</property>    initialization problem -->
		<property>/position/altitude-agl-ft</property>
	      </product>
	      <value>0.768</value>
	    </pow>
	  </product>
	</exp>
      </difference>
    </function>


    <axis name="LIFT">
      <function name="aero/coefficient/CLo">
          <description>Lift_correction_to_get_Vmin_for_FlapPos3</description>
          <product>
              <property>aero/qbar-psf</property>
              <property>metrics/Sw-sqft</property>
              <value>0.0259</value> <!-- delta ca_max to gain Vmin for flap pos 3 and 80% elevator deflection (-18deg) -->
	      <value>1.0</value>
          </product>
      </function>

      <function name="aero/coefficient/CLalpha">
        <description>Lift_due_to_alpha</description>
        <product>
          <property>aero/qbar-psf</property>
          <property>metrics/Sw-sqft</property>
          <table>
            <independentVar lookup="row">aero/alpha-shifted-deg</independentVar>
            <tableData>
               -180    0.0
               -175.83 0.6968
               -166.46 0.67202
               -150.13 0.84832
               -135.31 0.91788
               -94.803 -0.089280
               -61.969 -0.9072
               -40.827 -0.98809
               -27.244 -0.62022
               -21.929 -0.80753
               -16.732 -0.84631
               5.4724 1.2351
               15     0.95
               29.331 0.9789
               48.701 0.98420
               80.472 0.21088
               130.39 -0.91177
               151.67 -0.67254
               170.36 -0.82879
               179.01 -3.4390e-05
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            </tableData>
          </table>
        </product>
      </function>

      <function name="aero/coefficient/CLadot">
          <description>Lift_due_to_alpha_rate</description>
          <product>
            <property>aero/qbar-psf</property>
            <property>metrics/Sw-sqft</property>
            <property>aero/alphadot-rad_sec</property>
            <property>aero/ci2vel</property>
            <value>0.347</value>
          </product>
      </function>

      <function name="aero/coefficient/CLq">
          <description>Lift_due_to_pitch_rate</description>
          <product>
            <property>aero/qbar-psf</property>
            <property>metrics/Sw-sqft</property>
            <property>velocities/q-aero-rad_sec</property>
            <property>aero/ci2vel</property>
            <value>4.337</value>
          </product>
      </function>

      <function name="aero/coefficient/CLDe">
          <description>Lift_due_to_elevator_deflection</description>
          <product>
            <property>aero/qbar-psf</property>
            <property>metrics/Sw-sqft</property>
            <property>fcs/elevator-pos-rad</property>
            <value>0.195</value>
          </product>
      </function>

      <function name="aero/coefficient/CLDf">
          <description>Lift_due_to_flap_deflection</description>
          <product>
            <property>aero/qbar-psf</property>
            <property>metrics/Sw-sqft</property>
            <table>
              <independentVar
              lookup="row">fcs/flap-pos-deg</independentVar>
              <tableData>        <!-- delta ca_max to gain Vmin in Ref. 2-->
                -11.  -0.1368
                 -6.  -0.0363
                  0.   0.0000
                  9.   0.0774
                 55.   0.2537
              </tableData>
            </table>
      <!--
	    <property>fcs/flap-pos-rad</property>
            <value>0.2</value>
      -->
          </product>
      </function>

      <function name="aero/coefficient/CLDs">
          <description>Lift_due_to_Speedbrake</description>
          <product>
            <property>aero/qbar-psf</property>
            <property>metrics/Sw-sqft</property>
            <property>fcs/speedbrake-pos-norm</property>
            <table>	             <!-- Vmin +7km/h Ref. 2 -->
              <independentVar
              lookup="row">fcs/flap-pos-deg</independentVar>
              <tableData>
                -11.  -0.1935
                 -6.  -0.2173
                  0.  -0.2260
                  9.  -0.2451
                 55.  -0.2900
              </tableData>
            </table>
          </product>
      </function>

      <function name="aero/coefficient/CLDrain">
          <description>Lift_due_to_Rain</description>
          <product>
            <property>aero/qbar-psf</property>
            <property>metrics/Sw-sqft</property>
            <property>/environment/rain-norm</property>
	    <value>-0.3</value>  <!-- first guess  -->
          </product>
      </function>

    </axis>

    <axis name="DRAG">

      <function name="aero/coefficient/CDo">
          <description>Drag_at_zero_lift</description>
          <product>
            <property>aero/qbar-psf</property>
            <property>metrics/Sw-sqft</property>
            <!-- <value>0.0125</value>  -->
            <table>
              <independentVar
              lookup="row">fcs/flap-pos-deg</independentVar>
              <tableData>
                -11.   0.005
                 -6.   0.008
                  0.   0.0125
                  9.   0.0160
                 55.   0.0625
              </tableData>
            </table>
          </product>
      </function>

      <function name="aero/coefficient/CDi">
          <description>Drag-induced</description>
          <product>
            <property>aero/qbar-psf</property>
            <property>metrics/Sw-sqft</property>
	    <property>aero/F_GroundEffect</property>   <!-- Ref. 7 p 23 (2.7) -->
	    <value>0.0152</value>
	    <pow>
	      <difference>
	    	<pow>
	    	  <property>aero/cl-squared</property>
            	  <value>0.5</value>
	    	</pow>
	    	<!-- <value>0.1</value> -->
            <table>
              <independentVar
              lookup="row">fcs/flap-pos-deg</independentVar>
              <tableData>
                -11.  -0.28
                 -6.  -0.1
                  0.   0.1
                  9.   0.2
                 55.   0.2
              </tableData>
            </table>
	      </difference>
	      <value>2</value>
	    </pow>
          </product>
      </function>

      <function name="aero/coefficient/CDalpha">
        <description>Drag_due_to_alpha</description>
        <product>
          <property>aero/qbar-psf</property>
          <property>metrics/Sw-sqft</property>
          <table>
            <independentVar
            lookup="row">aero/alpha-shifted-deg</independentVar>
            <tableData>
             -178.84  0.038801
             -166.41  0.15873
             -157.37  0.3739
             -144.03  0.99471
             -134.41  1.3686
             -119.77  1.6508
             -108.58  1.7813
              -98.485 1.8236
              -83.291 1.7108
              -69.576 1.4956
              -56.168 1.2099
              -43.06  0.85009
              -28.984 0.38095
              -17.507 0.000000
               -3.460 -0.00048
               -2.340 -0.00146
               -1.650 -0.00150
                0.080 -0.00030
                2.2835 0.00150
                5.4724 0.00600
		9.     0.01104
               10.     0.05
	       15     0.1109
	       20     0.2633
               21.891 0.32099
               41.284 0.97002
               57.728 1.4074
               72.792 1.672
               81.580 1.7778
               92.481 1.8272
              108.05  1.7354
              128.84  1.4039
              140.73  1.0406
              147.74  0.68430
              155.42  0.43034
              167.58  0.16226
              178.31  0.045855
            </tableData>
          </table>
	</product>
      </function>

      <function name="aero/coefficient/CDbeta">
          <description>Drag_due_to_sideslip</description>
          <product>
            <property>aero/qbar-psf</property>
            <property>metrics/Sw-sqft</property>
            <property>aero/mag-beta-rad</property>
            <value>0.0150</value>
          </product>
      </function>

      <function name="aero/coefficient/CDDe">
          <description>Drag_due_to_Elevator_Deflection</description>
          <product>
            <property>aero/qbar-psf</property>
            <property>metrics/Sw-sqft</property>
            <property>fcs/mag-elevator-pos-rad</property>
            <value>0.0002</value>
          </product>
      </function>

      <function name="aero/coefficient/CDDr">
          <description>Drag_due_to_Rudder_Deflection</description>
          <product>
            <property>aero/qbar-psf</property>
            <property>metrics/Sw-sqft</property>
            <property>fcs/mag-rudder-pos-rad</property>
            <value>0.0004</value>
          </product>
      </function>

      <function name="aero/coefficient/CDDa">
          <description>Drag_due_to_Aileron_Deflection</description>
          <product>
            <property>aero/qbar-psf</property>
            <property>metrics/Sw-sqft</property>
            <property>fcs/mag-left-aileron-pos-rad</property>
	    <value>1.6</value> <!-- correction factor to keep UIUC-value (UIUC has different deflections)  -->
            <value>0.0003</value>
          </product>
      </function>

<!-- see cd0
      <function name="aero/coefficient/CDDf">
          <description>Drag_due_to_Flap_Deflection</description>
          <product>
            <property>aero/qbar-psf</property>
            <property>metrics/Sw-sqft</property>
            <table>
              <independentVar
              lookup="row">fcs/flap-pos-deg</independentVar>
              <tableData>
                -11.  0.0
                 -6.  0.0
                  0.  0.0
                  9.  0.0
                 55.  0.0
              </tableData>
            </table>
          </product>
      </function>
-->
      <function name="aero/coefficient/CDDs">
          <description>Drag_due_to_Speedbrake</description>
          <product>
            <property>aero/qbar-psf</property>
            <property>metrics/Sw-sqft</property>
            <property>fcs/speedbrake-pos-norm</property>
            <value>0.05</value>  <!-- cd_sb * A_sb/A_wing = 2*( 1.4 * 1.2m * 0.15m / 10m^2 ) -->
          </product>
      </function>

      <function name="aero/coefficient/CDDg">
          <description>Drag_due_to_Gear</description>
          <product>
            <property>aero/qbar-psf</property>
            <property>metrics/Sw-sqft</property>
	    <property>gear/gear-pos-norm</property>
            <value>0.025</value>  <!-- rough guess -->
          </product>
      </function>

      <function name="aero/coefficient/CDDrain">
          <description>Drag_due_to_Rain</description>
          <product>
            <property>aero/qbar-psf</property>
            <property>metrics/Sw-sqft</property>
            <property>/environment/rain-norm</property>
	    <value>0.1</value>  <!-- first guess  -->
          </product>
      </function>

    </axis>

    <axis name="SIDE">

      <function name="aero/coefficient/CYb">
        <description>Side_force_due_to_beta</description>
        <product>
          <property>aero/qbar-psf</property>
          <property>metrics/Sw-sqft</property>
          <property>aero/beta-rad</property>
          <value>-0.316</value>
        </product>
      </function>

      <function name="aero/coefficient/CYp">
        <description>Side_force_due_to_roll_rate</description>
        <product>
          <property>aero/qbar-psf</property>
          <property>metrics/Sw-sqft</property>
          <property>aero/bi2vel</property>
          <property>velocities/p-aero-rad_sec</property>
          <value>-0.2</value>
        </product>
      </function>

      <function name="aero/coefficient/CYr">
        <description>Side_force_due_to_yaw_rate</description>
        <product>
          <property>aero/qbar-psf</property>
          <property>metrics/Sw-sqft</property>
          <property>aero/bi2vel</property>
          <property>velocities/r-aero-rad_sec</property>
          <value>0.164</value>
        </product>
      </function>

      <function name="aero/coefficient/CYDa">
          <description>Side_force_due_to_aileron</description>
          <product>
            <property>aero/qbar-psf</property>
            <property>metrics/Sw-sqft</property>
            <property>fcs/aileron-control-rad</property>
	    <value>1.6</value> <!-- correction factor to keep UIUC-value (UIUC has different deflections)  -->
            <value>0.0456</value>
          </product>
      </function>

      <function name="aero/coefficient/CYDr">
          <description>Side_force_due_to_rudder</description>
          <product>
            <property>aero/qbar-psf</property>
            <property>metrics/Sw-sqft</property>
            <property>fcs/rudder-pos-rad</property>
            <value>0.158</value>
          </product>
      </function>

    </axis>

    <axis name="ROLL">

      <function name="aero/coefficient/Clb">
        <description>Roll_moment_due_to_beta</description>
        <product>
          <property>aero/qbar-psf</property>
          <property>metrics/Sw-sqft</property>
          <property>metrics/bw-ft</property>
          <property>aero/beta-rad</property>
          <value>-0.0693</value>
        </product>
      </function>

      <function name="aero/coefficient/Clp">
        <description>Roll_moment_due_to_roll_rate</description>
        <product>
          <property>aero/qbar-psf</property>
          <property>metrics/Sw-sqft</property>
          <property>metrics/bw-ft</property>
          <property>aero/bi2vel</property>
          <property>velocities/p-aero-rad_sec</property>
          <value>-0.6843</value>
        </product>
      </function>

      <function name="aero/coefficient/Clp_Stall">
        <description>Roll_moment_due_to_roll_rate_at_stall</description>
        <product>
          <property>aero/qbar-psf</property>
          <property>metrics/Sw-sqft</property>
          <property>metrics/bw-ft</property>
          <property>aero/bi2vel</property>
          <property>velocities/p-aero-rad_sec</property>
          <value>-0.6843</value>
          <table>          <!-- increasing factor due to stalled wing -->
             <independentVar lookup="row">aero/alpha-deg</independentVar>
             <tableData>
	      -180.0    0.0
                 0.0	0.0
                 8.0	0.0
                15.0   -0.5
                50.0   -0.7
	       180.0    0.0
             </tableData>
          </table>
        </product>
      </function>

      <function name="aero/coefficient/Clr">
        <description>Roll_moment_due_to_yaw_rate</description>
        <product>
          <property>aero/qbar-psf</property>
          <property>metrics/Sw-sqft</property>
          <property>metrics/bw-ft</property>
          <property>aero/bi2vel</property>
          <property>velocities/r-aero-rad_sec</property>
          <value>0.1551</value>
        </product>
      </function>

      <function name="aero/coefficient/Clr_Stall">
        <description>Roll_moment_due_to_yaw_rate_at_stall</description>
        <product>
          <property>aero/qbar-psf</property>
          <property>metrics/Sw-sqft</property>
          <property>metrics/bw-ft</property>
          <property>aero/bi2vel</property>
          <property>velocities/r-aero-rad_sec</property>
          <value>0.1551</value>
          <table>          <!-- increasing factor due to stalled wing -->
             <independentVar lookup="row">aero/alpha-deg</independentVar>
             <tableData>
	      -180.0    0.0
                 0.0	0.0
                 8.0	0.0
                15.0    2.0
                50.0	0.2
	       180.0    0.0
             </tableData>
          </table>
        </product>
      </function>

      <function name="aero/coefficient/Clda">
        <description>Roll_moment_due_to_aileron</description>
        <product>
          <property>aero/qbar-psf</property>
          <property>metrics/Sw-sqft</property>
          <property>metrics/bw-ft</property>
          <property>fcs/aileron-control-rad</property>
	  <value>1.6</value>  <!-- 1.6 correction factor to keep UIUC-value (UIUC has different deflections)  -->
          <value>0.214</value>
        </product>
      </function>

      <function name="aero/coefficient/Clda_Stall">
        <description>Roll_moment_due_to_aileron_at_stall</description>
        <product>         <!-- adverse aileron effectivity -->
          <property>aero/qbar-psf</property>
          <property>metrics/Sw-sqft</property>
          <property>metrics/bw-ft</property>
          <property>fcs/aileron-control-rad</property>
	  <value>1.6</value>  <!-- correction factor to keep UIUC-value (UIUC has different deflections)  -->
          <value>0.214</value>
            <table>          <!-- increasing factor -->
              <independentVar lookup="row">aero/alpha-deg</independentVar>
              <independentVar lookup="column">fcs/aileron-control-rad</independentVar>
              <tableData>
	                 -0.2792        0     0.2792
    	  	-180.0      0.0        0.0   	0.0
    	  	   0.0      0.0        0.0   	0.0
    	  	   8.0      0.0        0.0   	0.0
    	  	  13.0     -1.3       -0.5     -1.3
    	  	  50.0     -1.        -1.0     -1.
    	  	 180.0      0.0        0.0   	0.0
              </tableData>
	   </table>
        </product>
      </function>

      <function name="aero/coefficient/ClDr">
        <description>Roll_moment_due_to_rudder</description>
        <product>
          <property>aero/qbar-psf</property>
          <property>metrics/Sw-sqft</property>
          <property>metrics/bw-ft</property>
          <property>fcs/rudder-pos-rad</property>
          <value>-0.0065</value> <!-- wrong sign in uiuc (+0.0065)? changed here to -0.0065 (favorable roll moment) -->
        </product>
      </function>

      <function name="aero/coefficient/ClWingFailure">
        <description>Roll_moment_due_to_wing_failure</description>
        <product>
          <property>forces/fbz-aero-lbs</property>
	  <value>1.</value> <!-- only 1 wing remaining -->
	  <property>metrics/bw-ft</property>
	  <value>0.25</value> <!-- moment arm: half of 1 wing-span  -->
	  <property>/sim/asw20/wing-failure-direction</property>
        </product>
      </function>

    </axis>

    <axis name="PITCH">


      <function name="aero/coefficient/Cmo">
        <description>Pitching_moment_at_zero_alpha</description>
        <product>
          <property>aero/qbar-psf</property>
          <property>metrics/Sw-sqft</property>
          <property>metrics/cbarw-ft</property>
          <value>1.0</value>
          <table>	    <!-- shift due to flap position -->
            <independentVar lookup="row">fcs/flap-pos-deg</independentVar>
            <tableData>     <!-- rough guess (experimental) -->
              -11.   0.03
               -6.   0.01
          	0.   0.0
          	9.  -0.01
               55.  -0.05
            </tableData>
          </table>
        </product>
      </function>

      <function name="aero/coefficient/Cmalpha">
        <description>Pitch_moment_due_to_alpha</description>
        <product>
          <property>aero/qbar-psf</property>
          <property>metrics/Sw-sqft</property>
          <property>metrics/cbarw-ft</property>
          <table>
            <independentVar lookup="row">aero/alpha-deg</independentVar>
            <tableData>
             -180.47    0.0059721
             -162.99    0.2532
             -141.94    0.42879
             -117.32    0.53276
             -100.50    0.51757
              -79.17    0.40986
              -51.187   0.18276
              -29.126  -0.032321
              -21.297  -0.11893
              -17.503  -0.14583
              -11.586  -0.12506
              -10      -0.1097
               -5      -0.0363
                0       0.0176
                5       0.0502
                9.4634  0.06545
               14.911   0.025
               19.893   -.025
               31.515  -0.132967
               62.814  -0.32311
               84.861  -0.45170
               98.133  -0.51157
              115.42   -0.50887
              141.46   -0.42282
              159.2    -0.2591
              180       0
            </tableData>
          </table>
        </product>
      </function>

      <function name="aero/coefficient/Cmadot">
          <description>Pitch_moment_due_to_alpha_rate</description>
          <product>
            <property>aero/qbar-psf</property>
            <property>metrics/Sw-sqft</property>
            <property>metrics/cbarw-ft</property>
            <property>aero/ci2vel</property>
            <property>aero/alphadot-rad_sec</property>
	    <value>-1.928</value>
          </product>
      </function>

      <function name="aero/coefficient/Cmq">
        <description>Pitch_moment_due_to_pitch_rate</description>
        <product>
          <property>aero/qbar-psf</property>
          <property>metrics/Sw-sqft</property>
          <property>metrics/cbarw-ft</property>
          <property>aero/ci2vel</property>
          <property>velocities/q-aero-rad_sec</property>
          <value>-24.098</value>
        </product>
      </function>

      <!--
      <function name="aero/coefficient/CmDf">
           <description>Pitch_moment_due_to_flap_deflection</description>
           <product>
               <property>aero/qbar-psf</property>
               <property>metrics/Sw-sqft</property>
               <property>metrics/cbarw-ft</property>
        	 <table>
        	     <independentVar>fcs/flap-pos-deg</independentVar>
        	     <tableData>
        		 0.0000    0.0000
        		 10.0000   -0.0654
        		 20.0000   -0.0981
        		 30.0000   -0.1140
        	     </tableData>
        	 </table>
           </product>
      </function>
      -->

      <function name="aero/coefficient/CmDe">
          <description>Pitch_moment_due_to_elevator_deflection</description>
          <product>
            <property>aero/qbar-psf</property>
            <property>metrics/Sw-sqft</property>
            <property>metrics/cbarw-ft</property>
            <table>
	      <!-- Note: here we would need a 2D-table for alpha-deg and elevator-deg
	  		 but with different alpha node values and node counts.
	  		 This feature is only supported for 3D-tables by JSBSim.
	  		 => Trick:
	  		 3D-table used to allow for different number of alpha nodes
	  		 (columns in each table are identical)
	      -->
              <independentVar lookup="row">aero/alpha-deg</independentVar>
              <independentVar lookup="column">aero/alpha-deg</independentVar>
	      <independentVar lookup="table">fcs/elevator-pos-deg</independentVar>
              <tableData breakPoint="-20">
	  			 -180	   180
    	  	-182.0000	0.0517    0.0517
    	  	-164.3200	0.4943    0.4943
    	  	-160.5300	0.5460    0.5460
    	  	-156.4200	0.5572    0.5572
    	  	-152.6300	0.5325    0.5325
    	  	-149.1600	0.5168    0.5168
    	  	-144.7400	0.5572    0.5572
    	  	-132.7400	0.6875    0.6875
    	  	-120.7400	0.7639    0.7639
    	  	-105.5800	0.7976    0.7976
    	  	 -98.0000	0.8044    0.8044
    	  	 -91.5260	0.8027    0.8027
    	  	 -64.5260	0.7379    0.7379
    	  	 -44.2370	0.6596    0.6596
    	  	 -29.9470	0.5658    0.5658
    	  	 -25.7630	0.5268    0.5268
    	  	 -23.9470	0.5152    0.5152
    	  	 -21.5790	0.5209    0.5209
    	  	 -19.5260	0.5668    0.5668
    	  	 -17.7890	0.6027    0.6027
    	  	 -16.2110	0.6127    0.6127
    	  	 -13.8420	0.5868    0.5868
    	  	  -2.0000	0.2745    0.2745
    	  	  13.3160      -0.1528   -0.1528
    	  	  16.7890      -0.2097   -0.2097
    	  	  19.2370      -0.2213   -0.2213
    	  	  21.3680      -0.2127   -0.2127
    	  	  23.0260      -0.1826   -0.1826
    	  	  24.1320      -0.1611   -0.1611
    	  	  26.5000      -0.1454   -0.1454
    	  	  29.6580      -0.1613   -0.1613
    	  	  34.1580      -0.2117   -0.2117
    	  	  45.2110      -0.3429   -0.3429
    	  	  63.7630      -0.5138   -0.5138
    	  	  88.1580      -0.6511   -0.6511
    	  	  96.8420      -0.6673   -0.6673
    	  	 105.3700      -0.6628   -0.6628
    	  	 115.7900      -0.6448   -0.6448
    	  	 127.1600      -0.5976   -0.5976
    	  	 140.1100      -0.4875   -0.4875
    	  	 149.8900      -0.3415   -0.3415
    	  	 160.3200      -0.1303   -0.1303
    	  	 164.4200      -0.0719   -0.0719
    	  	 167.5800      -0.1191   -0.1191
    	  	 169.4700      -0.1011   -0.1011
    	  	 178.0000	0.0517    0.0517
              </tableData>
              <tableData breakPoint="0">
	  			 -180	   180
    	  	-182.0000	0.0000    0.0000
    	  	-169.0500	0.2853    0.2853
    	  	-166.5300	0.3280    0.3280
    	  	-164.0000	0.3370    0.3370
    	  	-161.7900	0.3145    0.3145
    	  	-158.9500	0.2943    0.2943
    	  	-156.4200	0.3145    0.3145
    	  	-145.3700	0.5033    0.5033
    	  	-131.4700	0.6471    0.6471
    	  	-119.1600	0.7055    0.7055
    	  	-108.1100	0.7347    0.7347
    	  	 -98.3160	0.7392    0.7392
    	  	 -92.5530	0.7309    0.7309
    	  	 -65.9470	0.6459    0.6459
    	  	 -46.3680	0.5095    0.5095
    	  	 -36.2630	0.4143    0.4143
    	  	 -30.9740	0.3423    0.3423
    	  	 -28.8420	0.3293    0.3293
    	  	 -27.2630	0.3414    0.3414
    	  	 -24.8950	0.3888    0.3888
    	  	 -22.3680	0.4333    0.4333
    	  	 -19.9210	0.4425    0.4425
    	  	 -17.1580	0.4288    0.4288
    	  	 -14.9470	0.3971    0.3971
    	  	  -2.0000	0.0000    0.0000
    	  	  10.9470      -0.3971   -0.3971
    	  	  13.1580      -0.4288   -0.4288
    	  	  15.9210      -0.4425   -0.4425
    	  	  18.3680      -0.4333   -0.4333
    	  	  20.8950      -0.3888   -0.3888
    	  	  23.2630      -0.3414   -0.3414
    	  	  24.8420      -0.3293   -0.3293
    	  	  26.9740      -0.3423   -0.3423
    	  	  32.2630      -0.4143   -0.4143
    	  	  42.3680      -0.5095   -0.5095
    	  	  61.9470      -0.6459   -0.6459
    	  	  88.5530      -0.7309   -0.7309
    	  	  94.3160      -0.7392   -0.7392
    	  	 104.1100      -0.7347   -0.7347
    	  	 115.1600      -0.7055   -0.7055
    	  	 127.4700      -0.6471   -0.6471
    	  	 141.3700      -0.5033   -0.5033
    	  	 152.4200      -0.3145   -0.3145
    	  	 154.9500      -0.2943   -0.2943
    	  	 157.7900      -0.3145   -0.3145
    	  	 160.0000      -0.3370   -0.3370
    	  	 162.5300      -0.3280   -0.3280
    	  	 165.0500      -0.2853   -0.2853
    	  	 178.0000	0.0000    0.0000
    	      </tableData>
              <tableData breakPoint="20">
        			 -180	    180
    	  	-182.0000      -0.0517    -0.0517
    	  	-173.4700	0.1011     0.1011
    	  	-171.5800	0.1191     0.1191
    	  	-168.4200	0.0719     0.0719
    	  	-164.3200	0.1303     0.1303
    	  	-153.8900	0.3415     0.3415
    	  	-144.1100	0.4875     0.4875
    	  	-131.1600	0.5976     0.5976
    	  	-119.7900	0.6448     0.6448
    	  	-109.3700	0.6628     0.6628
    	  	-100.8420	0.6673     0.6673
    	  	 -92.1580	0.6511     0.6511
    	  	 -67.7630	0.5138     0.5138
    	  	 -49.2110	0.3429     0.3429
    	  	 -38.1580	0.2117     0.2117
    	  	 -33.6580	0.1613     0.1613
    	  	 -30.5000	0.1454     0.1454
    	  	 -28.1320	0.1611     0.1611
    	  	 -27.0260	0.1826     0.1826
    	  	 -25.3680	0.2127     0.2127
    	  	 -23.2370	0.2213     0.2213
    	  	 -20.7890	0.2097     0.2097
    	  	 -17.3160	0.1528     0.1528
    	  	  -2.0000      -0.2745    -0.2745
    	  	  9.8420       -0.5868    -0.5868
        	 12.2110       -0.6127    -0.6127
    	  	 13.7890       -0.6027    -0.6027
    	  	 15.5260       -0.5668    -0.5668
    	  	 17.5790       -0.5209    -0.5209
    	  	 19.9470       -0.5152    -0.5152
    	  	 21.7630       -0.5268    -0.5268
    	  	 25.9470       -0.5658    -0.5658
    	  	 40.2370       -0.6596    -0.6596
    	  	 60.5260       -0.7379    -0.7379
    	  	 87.5260       -0.8027    -0.8027
    	  	 94.0000       -0.8044    -0.8044
    	  	101.5800       -0.7976    -0.7976
    	  	116.7400       -0.7639    -0.7639
    	  	128.7400       -0.6875    -0.6875
    	  	140.7400       -0.5572    -0.5572
    	  	145.1600       -0.5168    -0.5168
    	  	148.6300       -0.5325    -0.5325
    	  	152.4200       -0.5572    -0.5572
    	  	156.5300       -0.5460    -0.5460
    	  	160.3200       -0.4943    -0.4943
    	  	178.0000       -0.0517    -0.0517
              </tableData>
            </table>
          </product>
      </function>

    </axis>

    <axis name="YAW">

      <function name="aero/coefficient/Cnb">
        <description>Yaw_moment_due_to_beta</description>
        <product>
          <property>aero/qbar-psf</property>
          <property>metrics/Sw-sqft</property>
          <property>metrics/bw-ft</property>
          <property>aero/beta-rad</property>
          <value>0.1007</value>
        </product>
      </function>

      <function name="aero/coefficient/Cnp">
        <description>Yaw_moment_due_to_roll_rate</description>
        <product>
          <property>aero/qbar-psf</property>
          <property>metrics/Sw-sqft</property>
          <property>metrics/bw-ft</property>
          <property>aero/bi2vel</property>
          <property>velocities/p-aero-rad_sec</property>
          <value>-0.08591</value>
        </product>
      </function>

      <function name="aero/coefficient/Cnp_Stall">
        <description>Yaw_moment_due_to_roll_rate_at_stall</description>
        <product>
          <property>aero/qbar-psf</property>
          <property>metrics/Sw-sqft</property>
          <property>metrics/bw-ft</property>
          <property>aero/bi2vel</property>
          <property>velocities/p-aero-rad_sec</property>
          <value>-0.08591</value>
          <table>           <!-- increasing factor -->
             <independentVar lookup="row">aero/alpha-deg</independentVar>
             <tableData>
	      -180.0    0.0
                 0.0	0.0
                 8.0	0.0
                15.0   -2.0
                50.0   -0.5
	       180.0    0.0
             </tableData>
          </table>
        </product>
      </function>

      <function name="aero/coefficient/Cnr">
        <description>Yaw_moment_due_to_yaw_rate</description>
        <product>
          <property>aero/qbar-psf</property>
          <property>metrics/Sw-sqft</property>
          <property>metrics/bw-ft</property>
          <property>aero/bi2vel</property>
          <property>velocities/r-aero-rad_sec</property>
          <value>-0.05389</value>
        </product>
      </function>

      <function name="aero/coefficient/Cnr_Stall">
        <description>Yaw_moment_due_to_yaw_rate_at_stall</description>
        <product>
          <property>aero/qbar-psf</property>
          <property>metrics/Sw-sqft</property>
          <property>metrics/bw-ft</property>
          <property>aero/bi2vel</property>
          <property>velocities/r-aero-rad_sec</property>
          <value>-0.05389</value>
          <table>           <!-- increasing factor -->
             <independentVar lookup="row">aero/alpha-deg</independentVar>
             <tableData>
	      -180.0    0.0
                 0.0	0.0
                 9.0	0.0
                15.0   -2.0
                50.0   -0.5
	       180.0    0.0
             </tableData>
          </table>

        </product>
      </function>

      <function name="aero/coefficient/Cnda">
        <description>Yaw_moment_due_to_aileron</description>
        <product>
          <property>aero/qbar-psf</property>
          <property>metrics/Sw-sqft</property>
          <property>metrics/bw-ft</property>
          <property>fcs/aileron-control-rad</property>
	  <value>-0.017</value> <!-- wrong sign in uiuc (+0.017)? Changed here to -0.017 (adverse yaw moment) -->
          <table>   <!-- adverse yaw moment is dependent on aileron flap position  -->
            <independentVar lookup="row">fcs/flap-pos-deg</independentVar>
            <tableData>
              -11.   0.5
               -6.   0.8
          	0.   1.
          	9.   1.6  <!-- correction factor to keep UIUC-value (UIUC has different deflections)  -->
               55.   0.9
            </tableData>
          </table>
        </product>
      </function>

      <function name="aero/coefficient/Cnda_Stall">
        <description>Yaw_moment_due_to_aileron_at_stall</description>
        <product>
          <property>aero/qbar-psf</property>
          <property>metrics/Sw-sqft</property>
          <property>metrics/bw-ft</property>
          <property>fcs/aileron-control-rad</property>
	  <value>1.</value> <!-- no correction factor to keep UIUC-value (UIUC has different deflections)  --><!-- correct UIUC deflection  -->
	  <value>-0.017</value>
          <table>           <!-- increasing factor -->
             <independentVar lookup="row">aero/alpha-deg</independentVar>
             <tableData>
	      -180.0    0.0
                 0.0	0.0
                 8.0	0.0
                15.0    2.0
                50.0    0.0
	       180.0    0.0
             </tableData>
          </table>
        </product>
      </function>

      <function name="aero/coefficient/CnDr">
          <description>Yaw_moment_due_to_rudder</description>
          <product>
              <property>aero/qbar-psf</property>
              <property>metrics/Sw-sqft</property>
              <property>metrics/bw-ft</property>
              <property>fcs/rudder-pos-rad</property>
	      <value>-0.041</value>
              <table>
                <independentVar lookup="row">aero/alpha-deg</independentVar>
                <tableData>
	         -180.  -1.
                  -90.0	 0.
                    0.	 1.
                   90.   0.
	          180.  -1.
                </tableData>
              </table>
          </product>
      </function>

      <function name="aero/coefficient/CnWingFailure">
        <description>Yaw_moment_due_to_wing_failure</description>
        <product>
          <property>forces/fbx-aero-lbs</property>
	  <value>1.</value> <!-- only 1 wing remaining -->
	  <property>metrics/bw-ft</property>
	  <value>0.25</value> <!-- moment arm: half of 1 wing-span  -->
	  <property>/sim/asw20/wing-failure-direction</property>
        </product>
      </function>

    </axis>

  </aerodynamics>

  <system file="GenericEngine"/>
  <system file="WaterBallast"/>
  <system file="WingFailure"/>

</fdm_config>
